// COMSOL Multiphysics 5.5.0.359 model "4L MoS2 FET.mph"
// Outline of the model tree

Parameters
  t_MoS2 = 0.7[nm]
  m_h = 0.5*me_const  // Holes Effective Mass
  me_eff = 0.5*me_const  // Electron Effective Mass
  N_c = (2*(2*pi*me_eff*k_B_const*T)/h_const^2)^(3/2)  // Effective DOS conduction band
  N_v = (2*(2*pi*m_h*k_B_const*T)/h_const^2)^(3/2)  // Effective DOS valence band
  T = 293[K]
  t_gate = 10[nm]
  VD = 5[V]  // Drain Voltage
  VG = 5[V]  // Gate Voltage
  tox = 2
  WF_gate = 5.1[V]
  epsr_ins = 25
  t_out = 6.8[um]
  donor_concentration = 1.5e18[cm^(-3)]  // Donor concentration

Geometry
  geom1 "Geometry 1" (2D, length unit µm)
    r1: Rectangle | pos = {-3, 0}; size = {6, 2}
    r2: Rectangle | pos = {-3, 2}; size = {6, 0.3}
    r3: Rectangle | pos = {-1.75, 2+0.3}; size = {3.5, 4*t_MoS2}
    r4: Rectangle | pos = {-3, 2+0.3}; size = {(6-3.5)/2, 75[nm]}
    r5: Rectangle | pos = {3-(6-3.5)/2, 2+0.3}; size = {(6-3.5)/2, 75[nm]}
    fin: Finalize "Form Union"

Materials
  mat1: Common "MoS2 - Monolayer" on domains 4
    def "Basic"
      relpermittivity = 11
    SemicondMaterial "Semiconductor material"
      Eg0 = 1.6
      chi0 = 4
      Nv = N_v
      Nc = N_c
      mun = 30[cm^2/(V*s)]
      mup = 30[cm^2/(V*s)]
    SRH "Shockley-Read-Hall recombination"
      taun = 0.3[ns]
      taup = 0.3[ns]
  mat2: Common "Air" (disabled) on no domains
    def "Basic"
      relpermittivity = 1
  mat6: Common "Si - Silicon" on domains 1
    def "Basic"
      relpermittivity = 11.7
      thermalconductivity = 131[W/(m*K)]
      density = 2329[kg/m^3]
      heatcapacity = 700[J/(kg*K)]
    AroraMobilityModel
      mun0_ref_arora = 1252[cm^2/(V*s)]
      mup0_ref_arora = 407[cm^2/(V*s)]
      mun_min_ref_arora = 88[cm^2/(V*s)]
      mup_min_ref_arora = 54.3[cm^2/(V*s)]
      Nn0_ref_arora = 1.26e17[1/cm^3]
      Np0_ref_arora = 2.35e17[1/cm^3]
      alpha0_arora = 0.88
      beta1_arora = -0.57
      beta2_arora = -2.33
      beta3_arora = -2.33
      beta4_arora = -0.146
      Tref_arora = 300[K]
    PowerLawMobilityModel
      mun0_pl = 1448[cm^2/(V*s)]
      mup0_pl = 473[cm^2/(V*s)]
      alphan_pl = 2.33
      alphap_pl = 2.23
      Tref_pl = 300[K]
    Auger "Auger recombination"
      Cn = 2.8e-31[cm^6/s]
      Cp = 9.9e-32[cm^6/s]
    Direct "Direct recombination"
      C = 0[cm^3/s]
    SRH "Shockley-Read-Hall recombination"
      taun = 10[us]
      taup = 10[us]
    FletcherMobilityModel
      F1_fl = 1.04e21[1/(cm^1*V*s)]
      F2_fl = 7.45e13[1/cm^2]
      Tref_fl = 300[K]
    CaugheyThomasMobilityModel
      alphan0_ct = 1.11
      alphap0_ct = 1.21
      vn0_ct = 1e7[cm/s]
      vp0_ct = 8.37e6[cm/s]
      betan1_ct = 0.66
      betap1_ct = 0.17
      betan2_ct = -0.87
      betap2_ct = -0.52
      Tref_ct = 300[K]
    SemicondMaterial "Semiconductor material"
      Eg0 = 1.12[V]
      chi0 = 4.05[V]
      Nv = (T/300[K])^(3/2)*1.04e19[1/cm^3]
      Nc = (T/300[K])^(3/2)*2.8e19[1/cm^3]
      mun = 1450[cm^2/(V*s)]
      mup = 500[cm^2/(V*s)]
    LombardiSurfaceMobilityModel
      deltan_ls = 5.82e14[V/s]
      deltap_ls = 2.05e14[V/s]
      mun1_ls = 4.75e7[cm^2/(V*s)]
      mup1_ls = 9.93e7[cm^2/(V*s)]
      mun2_ls = 1.74e5[cm^2/(V*s)]
      mup2_ls = 8.84e5[cm^2/(V*s)]
      alphan_ls = 0.125
      alphap_ls = 0.0317
      Tref_ls = 1[K]
      Eref_ls = 1[V/cm]
      Nref_ls = 1[1/cm^3]
    ImpactIonization
      an = 0.426
      ap = 0.243
      bn = 4.81E5[V/cm]
      bp = 6.53E5[V/cm]
      cnii = 3.05E-4
      cpii = 5.35E-4
      dn = 6.86E-4
      dp = 5.67E-4
    SlotboomModel
      Eref_sb = 0.00692[V]
      Nref_sb = 1.3e17[1/cm^3]
      alpha_sb = 0.5
    JainRoulstonModel
      An_jr = 3.5e-8[V]
      Bn_jr = 0[V]
      Cn_jr = 0[V]
      Ap_jr = 3.5e-8[V]
      Bp_jr = 0[V]
      Cp_jr = 0[V]
      Nref_jr = 1[1/cm^3]
      alpha_jr = 0.5
  mat7: Common "SiO2 - Silicon oxide" on domains 2
    def "Basic"
      electricconductivity = 0[S/m]
      thermalexpansioncoefficient = 0.5e-6[1/K]
      heatcapacity = 730[J/(kg*K)]
      relpermittivity = 4.2
      density = 2200[kg/m^3]
      thermalconductivity = 1.4[W/(m*K)]
    Enu "Young's modulus and Poisson's ratio"
      youngsmodulus = 70e9[Pa]
      poissonsratio = 0.17
  mat8: Common "Au - Gold" on domains 3, 5
    def "Basic"
      electricconductivity = 45.6e6[S/m]
      thermalexpansioncoefficient = 14.2e-6[1/K]
      heatcapacity = 129[J/(kg*K)]
      density = 19300[kg/m^3]
      thermalconductivity = 317[W/(m*K)]
    Enu "Young's modulus and Poisson's ratio"
      youngsmodulus = 70e9[Pa]
      poissonsratio = 0.44

Physics
  semi: Semiconductor on domains 2, 4
    dependent variable V2
    d.d = t_out
    smm1: SemiconductorMaterialModel (default)
    ins1: Insulation (default)
    zc1: ZeroCharge (default)
    ii1: InsulatorInterface (default)
    cont1: Continuity "Continuity/Heterojunction 1" (default)
    init1: init "Initial Values 1" (default)
    ccn1: ChargeConservation on domains 2
    tar1: TrapAssistedRecombination on domains 4
    mc1: MetalContact "Drain" on boundaries 8 | ContactType = ohmic; V0 = VD
    mc2: MetalContact "Source" on boundaries 12 | ContactType = ohmic; V0 = 0
    term1: Terminal "Gate" on boundaries 4 | TerminalType = Voltage; V0 = VG; Phic = 4.05
    adm1: AnalyticDopingModel on domains 4 | impurityType = donor; NAc = 1.5e18[1/cm^3]; NDc = donor_concentration

Mesh
  mesh1 "Mesh 1"
    size: MeshSizeDefault | hmax = 0.402; hmin = 0.0018; hcurve = 0.3; hgrad = 1.3
    size1: Size on domains 4 | hmin = 4.8E-4; hauto = 1
    size2: Size on boundaries 8, 12 | hauto = 1
    ftri1: FreeTri "Free Triangular 1" on remaining entities

Studies
  std1 "Id(Vd)"
    param: Parametric "Parametric Sweep"
      sweeptype = filled
      pname = {VG, donor_concentration}
      plistarr = {0.1, "1e18, 1.5e18, 2e18"}
      punit = {V, 1/cm^3}
    stat: Stationary | useparam = on; sweeptype = filled; pname = VD; plistarr = range(0,1,10); punit = V
  std2 "Id(Vg)"
    param: Parametric "Parametric Sweep"
      sweeptype = filled
      pname = {VD, donor_concentration}
      plistarr = {0.01, "1e18, 1.5e18, 2e18"}
      punit = {V, 1/cm^3}
    stat: Stationary | useparam = on; pname = VG; plistarr = range(0,5,20); punit = V

Solver configurations
  sol1 "Solution 1" (study std1)
    v1: Variables "Dependent Variables 1"
    s1: Stationary "Stationary Solver 1" | stol = 1.0E-6
      dDef: Direct
      fc1: FullyCoupled | linsolver = dDef; initstep = 0.1; maxiter = 50
      pDef: Parametric
  sol2 "Parametric Solutions 1" (study std1)
  sol6 "Solution 6" (study std2)
    v1: Variables "Dependent Variables 1"
    s1: Stationary "Stationary Solver 1" | stol = 1.0E-6
      p1: Parametric | porder = constant
      fc1: FullyCoupled | linsolver = d1; initstep = 0.1; minsteprecovery = 0.001; maxiter = 50
      d1: Direct
  sol7 "Parametric Solutions 2" (study std2)

Datasets
  dset1: Solution | solution = sol1
  dset2: Solution | solution = sol2
  dset3: Solution | solution = sol6
  dset4: Solution | solution = sol7

Plots
  pg1: PlotGroup2D "Electron Concentration (semi)" | data = dset2
    surf1: Surface | expr = semi.log10N
  pg2: PlotGroup2D "Hole Concentration (semi)" | data = dset2
    surf1: Surface | expr = semi.log10P
  pg3: PlotGroup2D "Electric Potential (semi)" | data = dset2
    surf1: Surface | expr = V2
  pg4: PlotGroup2D "Electric Potential (es)" | data = dset2
    surf1: Surface | expr = V
  pg5: PlotGroup1D "Id(Vd)" | data = dset2
    glob1: Global
      expr = semi.I0_1
      unit = uA
      descr = Terminal current
      legends = {"VG=0.1 V, donor_concentration=1E18 1/cm<sup>3</sup>", "VG=0.1 V, donor_concentration=1.5E18 1/cm<sup>3</sup>", "VG=0.1 V, donor_concentration=2E18 1/cm<sup>3</sup>"}
  pg6: PlotGroup2D "Electron Concentration (semi) 1" | data = dset4
    surf1: Surface | expr = semi.log10N
  pg7: PlotGroup2D "Hole Concentration (semi) 1" | data = dset4
    surf1: Surface | expr = semi.log10P
  pg8: PlotGroup2D "Electric Potential (semi) 1" | data = dset4
    surf1: Surface | expr = V2
  pg9: PlotGroup2D "Electric Potential (es) 1" | data = dset4
    surf1: Surface | expr = V
  pg10: PlotGroup1D "Id(Vg)" | data = dset4
    glob1: Global
      expr = semi.I0_1
      unit = nA
      legends = {"VD=0.01 V, donor_concentration=1E18 1/cm<sup>3</sup>", "VD=0.01 V, donor_concentration=1.5E18 1/cm<sup>3</sup>", "VD=0.01 V, donor_concentration=2E18 1/cm<sup>3</sup>"}